*RESTART, READ
*Step
*Dynamic
1e-05, 0.001, 1e-08, 1e-05
*Cload, OP=NEW
2, 2, -0.01418208075
3, 2, -0.01614141643
4, 1, 0.0005532645389
4, 2, -0.02156515863
5, 1, 0.0007638017351
5, 2, -0.02740642049
6, 1, 0.0008968343245
6, 2, -0.03158891758
7, 1, 0.0008825149137
7, 2, -0.03169205509
8, 1, 0.0005217016557
8, 2, -0.01924171828
9, 1, 0.0006141186901
9, 2, -0.02326166225
10, 1, 0.0005152989234
10, 2, -0.02002126714
11, 1, -0.01460857095
2, 6, -0.0002432319848
3, 6, -0.0002388347339
4, 6, -0.0003252354465
5, 6, -0.0004819934938
6, 6, -0.000617754846
7, 6, -0.0006891485444
8, 6, -0.0003459614702
9, 6, -0.00031750366
10, 6, -0.000351422406
11, 6, -7.571241297e-07
*NODE FILE,OUTPUT=2D
U
*EL PRINT,ELSET=Eall,FREQUENCY=100
S
*RESTART,WRITE,FREQUENCY=1
*END STEP
